# DESIGN OF TORSION REINFORCEMENT OF RECTANGULAR BEAM AS PER ACI 318M-08
# Administration
# - Sheet originator: NZI
# - Sheet verificator: XGA
# - Revision = 0
# - Date of last revision: 14/01/2014
# - Updated by: LWW per ACI318-14
# - Date of update:  17/6/2020
# References:
# [1] ACI 318M-14
# Notes :
# - Only for rectangular cross-section
# - Only transversal reinforcement perpendicular to axis of mumber is used
# - Only for f_c < 70 MPa
# - for normalweight concrete
# - for nonprestressed members
# - Requirements for Earthquakes SDC-D/E or F are considered (not SDC-A/B and C)
# Data :
b := 230  # cm  # Width of compression zone
h := 170  # cm  # Height of beam
d := 170 - 7.5  # cm  # Effective depth of beam
e1 := 7.5  # cm  # Cover of stirrups for top-bottom faces
e2 := 22.5  # cm  # Cover of stirrups for lateral faces
N_u := 0  # kN  # Ultimate tension force (N_u) negative for tension)
V_u := 619  # kN  # Ultimate shear force
T_u := 838  # kNm  # Ultimate torsional moment
A_v := 40.14  # cm²/m  # Total stirrup area for shear reinforcement
f_c := 40  # N/mm²  # Specified cylinder strength of concrete
f_y := 420  # N/mm²  # Specified yield strength of steel
# Earthquakes
Seism := 0  # -  # (Considering of earthquakes - 1 = yes / 0 = no)
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# Click here below to see/hide calculation details
# Calculation:
ϕ :=
    0.75 if Seism == 0
    0.6 otherwise
# Strength-reduction factor  Ref [1] § 21.2.1 and §21.2.4
ϕ = 0.75
# Calculation of torsion strength provided by concrete
A_cp := b*h*10^2
# Ref [1] § 2.1
A_cp = 3910000  # mm^2
p_cp := (2*b + 2*h)*10
# Ref [1] § 2.1
p_cp = 8000  # mm
A_g := b*h*10^2
# Ref [1] § 2.1
A_g = 3910000  # mm²
Torsion_effects := if(T_u*10^6 < ϕ*0.083*sqrt(f_c)*(A_cp^2/p_cp)*sqrt(1 + N_u*10^3/(0.33*A_g*sqrt(f_c))), "negligible", "not negligible")
# Ref [1] § 22.7.4.1
Torsion_effects = "not negligible"
# Calculation of transverse reinforcement resisting torsion (area of one leg of a closed stirrup)
A_oh := (h - 2*e1)*(b - 2*e2)*10^2
# Ref [1] § 2.1
A_oh = 2867500  # mm²
f_y := min(f_y, 420)
# Ref [1] § 20.2.2.4
f_y = 420  # MPa
A_t :=
    T_u*10^6*10^3/(2*ϕ*0.85*A_oh*f_y) if Torsion_effects ≠ "negligible"
    0 otherwise
# Ref [1] § 22.7.6.1
A_t = 545.734  # mm²/m
# Calculation of minimum transverse reinforcement for torsion
A_tmin := max(0, 0.062*sqrt(f_c)*b*10^4/(2*f_y) - A_v*10^2/2, 0.35*b*10^4/(2*f_y) - A_v*10^2/2)  # Ref [1] § 9.6.4.2
A_tmin = 0  # mm²/m
A_t := max(A_tmin/100, A_t/100)
A_t = 5.45734  # cm²/m
# Calculation of maximum stirrup spacing
s_max := min((b - 2*e2 + h - 2*e1)*2*10/8, 300)
# Ref [1] § 9.7.6.3.3
s_max = 300  # mm
# Calculation of longitudinal reinforcement for torsion
p_h := (b - 2*e2 + h - 2*e1)*2*10
# Ref [1] § 2.1
p_h = 6800  # mm
A_l := A_t*10^2*p_h*10^-3
# Ref [1] § 9.7.5
A_l = 3710.99  # mm²
A_lmin := min(0.42*sqrt(f_c)*A_cp/f_y - A_l, 0.42*sqrt(f_c)*A_cp/f_y - 0.175*b*p_h/f_y)
# Ref [1] § 9.6.4.3
A_lmin = 21018  # mm²
A_lmin := max(A_lmin, 0)
A_lmin = 21018  # mm²
A_l :=
    max(A_l/100, A_lmin/100) if Torsion_effects ≠ "negligible"
    0 otherwise
A_l = 210.18  # cm²
d_bmin := max(10, 0.042*s_max)
# Ref [1] § 9.7.5.2)
d_bmin = 12.6  # mm
# Check for crushing of the concrete compression struts
V_C := 0.17*(1 + N_u*10^3/(14*A_g))*sqrt(f_c)*b*d*10^-1
# Ref [1] § 11.5.4.6
V_C = 4018.46  # kN
Crushing_of_concrete := if(sqrt((V_u*10^3/(b*d*10^2))^2 + (T_u*10^6*p_h/(1.7*A_oh^2))^2) ≤ ϕ*(V_C*10^3/(b*d*10^2) + 0.66*sqrt(f_c)), "ok", "not ok")
# Ref [1] § 22.7.7
Crushing_of_concrete = "ok"
# Earthquakes requirements
# Material :
f_c = 40  # MPa
CheckFc :=
    "ok" if f_c ≥ 21 or Seism == 0
    "not ok !!! --> fc must be greater than 21MPa" otherwise  # (Minimum concrete resistance - Ref[1] §19.2.1)
CheckFc = "ok"
# Geometry :
b = 230  # cm
CheckBw :=
    "ok" if b ≥ min(0.3*h, 25) or Seism == 0
    "not ok !!! --> increase b !!!" otherwise  # (Minimum width - Ref[1] §18.6.2.1(b))
CheckBw = "ok"
# Results:
Torsion_effects = "not negligible"
Crushing_of_concrete = "ok"
# Additional longitudinal reinforcement :
A_l = 210.18  # cm²/m
# Transverse reinforcement (stirrups) :
A_t = 5.45734  # cm²/m
# Maximum stirrup spacing :
s_max = 300  # mm
# Minimum longitudinal bar diameter :
d_bmin = 12.6  # mm
# Specifications for Earthquakes - Material :
CheckFc = "ok"
# - Width :
CheckBw = "ok"
