# DESIGN OF SHEAR REINFORCEMENT OF RECTANGULAR BEAM AS PER ACI 318-14
# Administration
# - Sheet originator: JLG
# - Sheet verificator: XFA-AL
# - Revision = 1
# - Date of last revision: 25/04/2013
# - Updated by LWW per ACI318-14
# - Date of update:  01/07/2020
# References:
# [1] ACI 318-14
# Notes:
# - Only shear reinforcement perpendicular to axis of mumber is used
# - Only for f_c < 70 MPa
# - for normalweight concrete
# Data:
b := 230  # cm  # Width of compression zone
h := 170  # cm  # Height of beam
d := 170 - 7.5  # cm  # Effective depth of beam
A_s := 336  # cm²  # Area of longitudinal tension reinforcement
N_u := 0  # kN  # Ultimate tension force (N_u) negative for tension)
V_u := 973  # kN  # Ultimate shear force
M_u := 2611  # kNm  # Ultimate bending moment
f_c := 40  # N/mm²  # Specified cylinder strength of concrete
f_y := 420  # N/mm²  # Specified yield strength of steel
ϕ := 0.75  # -  # Strength-reduction factor  Ref [1] § 21.2
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# Click here below to see/hide calculation details
# Calculation:
# Calculation of shear strength provided by concrete
A_g := b*h
# Ref [1] § 2.1
A_g = 39100  # cm²
ρ_w := A_s/(b*d)
# Ref [1] § 2.1
ρ_w = 0.00898997
M_m := M_u - N_u*(4*h - d)/8*10^-2
# Ref [1] § 22.5.6
M_m = 2611  # kN
# If bending moment only
V_cM := if(M_u == 0, 0.17*sqrt(f_c)*b*d*1/10, (0.16*sqrt(f_c) + 17*ρ_w*min(1, V_u*d/(M_u*10^2)))*b*d*1/10)  # Ref [1] § 22.5.5
V_cM = 4127.98  # kN
V_.cM := min(V_cM, 0.29*sqrt(f_c)*b*d*10^-1)
# Ref [1] § 22.5.5
V_.cM = 4127.98  # kN
# If axial force only
V_cN :=
    0.17*(1 + N_u*10^3/(14*A_g*10^2))*sqrt(f_c)*b*d*10^-1 if N_u ≥ 0
    0.17*(1 + 0.29*N_u*10^3/(A_g*10^2))*sqrt(f_c)*b*d*10^-1 otherwise
# (Compression)
# Ref [1] § 22.5.6.1
V_cN = 4018.46  # kN
# (Tension)
# Ref [1] § 22.5.7.1
# If axial force and bending moment
V_NMmax := 0.29*sqrt(f_c)*b*d*10^-1*sqrt(1 + 0.29*N_u*1000/(A_g*100))  # Ref [1] § 22.5.6.1
V_cNM :=
    (0.16*sqrt(f_c) + 17*ρ_w*V_u*d/(M_m*100))*b*d*1/10 if M_m > 0
    V_NMmax otherwise
# Ref [1] § 22.5.6.1
V_cNM = 4127.98  # kN
V_.cNM := min(V_cNM, V_NMmax)
V_.cNM = 4127.98  # kN
V_c :=
    V_cN if M_u == 0
    V_cM if N_u == 0
    V_cNM if N_u > 0
    min(V_cN, V_cM) otherwise
V_c = 4127.98  # kN
# Calculation of shear reinforcement needed
f_y := min(f_y, 420)
# Ref [1] § 20.2.2.4
f_y = 420  # MPa
A_vmin := max(0.35*b*100/f_y, 0.062*sqrt(f_c)*b*100/f_y)
# Ref [1] § 9.6.3.3
A_vmin = 21.4734  # cm²/m
A_v := (V_u - ϕ*V_c)/(ϕ*f_y*d)*10*100
# Ref [1] § 22.5.10.5; R.22.5.10.5
A_v = -41.4747  # cm²/m
A_v := max(0, A_v, A_vmin)
A_v = 21.4734  # cm²/m
A_vmax := 0.66*sqrt(f_c)*b*d/f_y
# Ref [1] § 22.5.1.2
A_vmax = 371.455  # cm²/m
# Results:
A_v = 21.4734  # cm²/m
A_vmin = 21.4734  # cm²/m
A_vmax = 371.455  # cm²/m
